** ======================================================================
** MATERIAL PROPERTY DEFINITION: 16MnCr5 (EN 10084 Case Hardening Steel)
** Temperature-Dependent Elasto-Plastic & Annealing Properties
** For Sequentially Coupled Thermo-Mechanical Laser Welding Analysis
** Units: mm, s, tonne, N, MPa (N/mm2), mJ, C
** ======================================================================
*MATERIAL, NAME="ABQ_MECH_16MNCR5"
*DENSITY
 7.8500E-09,
**
** ----------------------------------------------------------------------
** THERMAL EXPANSION (Temperature dependent)
** Total expansion coefficient alpha [1/K] vs Temperature [C]
** Reference temperature: 25.0 C
** ----------------------------------------------------------------------
*EXPANSION, ZERO=25.0
 1.15E-05,    20.0
 1.22E-05,   100.0
 1.30E-05,   200.0
 1.38E-05,   400.0
 1.45E-05,   600.0
 1.50E-05,   800.0
 1.55E-05,  1000.0
 1.60E-05,  1200.0
 1.65E-05,  1400.0
 1.70E-05,  1500.0
**
** ----------------------------------------------------------------------
** ELASTIC PROPERTIES (Temperature dependent)
** E [MPa], Poisson's ratio nu [-], Temperature [C]
** ----------------------------------------------------------------------
*ELASTIC
 210000.0, 0.29,    20.0
 205000.0, 0.29,   100.0
 195000.0, 0.30,   200.0
 175000.0, 0.31,   400.0
 120000.0, 0.33,   600.0
  50000.0, 0.36,   800.0
  18000.0, 0.39,  1000.0
   6000.0, 0.42,  1200.0
   1500.0, 0.45,  1400.0
    300.0, 0.48,  1500.0
**
** ----------------------------------------------------------------------
** PLASTIC PROPERTIES (Temperature dependent with isotropic hardening)
** Yield Stress [MPa], Plastic Strain [-], Temperature [C]
** ----------------------------------------------------------------------
*PLASTIC
 550.0, 0.000,    20.0
 720.0, 0.050,    20.0
 880.0, 0.150,    20.0
 520.0, 0.000,   100.0
 690.0, 0.050,   100.0
 850.0, 0.150,   100.0
 480.0, 0.000,   200.0
 640.0, 0.050,   200.0
 800.0, 0.150,   200.0
 400.0, 0.000,   400.0
 540.0, 0.050,   400.0
 680.0, 0.150,   400.0
 220.0, 0.000,   600.0
 300.0, 0.050,   600.0
 390.0, 0.150,   600.0
  70.0, 0.000,   800.0
 100.0, 0.050,   800.0
 135.0, 0.150,   800.0
  25.0, 0.000,  1000.0
  38.0, 0.050,  1000.0
  52.0, 0.150,  1000.0
  10.0, 0.000,  1200.0
  16.0, 0.050,  1200.0
  22.0, 0.150,  1200.0
   4.0, 0.000,  1400.0
   7.0, 0.050,  1400.0
  10.0, 0.150,  1400.0
   1.5, 0.000,  1500.0
   2.5, 0.050,  1500.0
   4.0, 0.150,  1500.0
**
** ----------------------------------------------------------------------
** ANNEALING TEMPERATURE
** Resets accumulated equivalent plastic strain (PEEQ) above 1500 C
** to simulate liquid-to-solid transition without fictitious strain history
** ----------------------------------------------------------------------
*ANNEAL TEMPERATURE
 1500.0
